# OpenSim document version 40000
Model Dennis:
  gravity: 0 -9.80665 0
  Ground
  BodySet:
    Body pelvis: mass=30 [kg] mass_center=(0 0 0) inertia=(0.2 0.2 0.2 0 0 0) meshes=cube.obj
    Body thigh: mass=10 mass_center=(0 0 0) inertia=(0.2113958 0.006125 0.2113958 0 0 0)
      Cylinder thigh_geom_1: radius=0.035 half_height=0.25
      WrapCylinder patella: translation=(0 -0.25 0) quadrant=x radius=0.08 length=0.07
    Body shank: mass=10 mass_center=(0 0 0) inertia=(0.2113958 0.006125 0.2113958 0 0 0)
      Cylinder thigh_geom_1: radius=0.035 half_height=0.25
  JointSet:
    SliderJoint slider: socket_parent_frame=ground_offset socket_child_frame=pelvis_offset
      Coordinate y: default_value=0.9 range=(0 2)
      PhysicalOffsetFrame ground_offset: socket_parent=/ground translation=(0 0 0) [meters]
          orientation=(0 0 1.570796) [radians]
      PhysicalOffsetFrame pelvis_offset: socket_parent=/bodyset/pelvis translation=(0 0 0) orientation=(0 0 1.570796)
    PinJoint hip: socket_parent_frame=pelvis_offset socket_child_frame=thigh_offset
      Coordinate hip_flexion: default_value=0.6981317 range=(-1.570796 1.919862)
      PhysicalOffsetFrame pelvis_offset: socket_parent=/bodyset/pelvis translation=(0 0 0)
      PhysicalOffsetFrame thigh_offset: socket_parent=/bodyset/thigh translation=(0 0.25 0)
    PinJoint knee: socket_parent_frame=thigh_offset socket_child_frame=shank_offset
      Coordinate knee_flexion: default_value=-1.396263 range=(-2.443461 -0.1745329)
      PhysicalOffsetFrame thigh_offset: socket_parent=/bodyset/thigh translation=(0 -0.25 0)
      PhysicalOffsetFrame shank_offset: socket_parent=/bodyset/shank translation=(0 0.25 0)
  ConstraintSet:
    PointOnLineConstraint point_on_line_constraint: socket_line_body=/ground socket_follower_body=/bodyset/shank
        line_direction_vec=(0 1 0) point_on_line=(0 0 0) point_on_follower=(0 -0.25 0)
  ForceSet:
    CoordinateLimitForce hip_flexion_limit_force: coordinate=hip_flexion upper_stiffness=20 [N*m/degree]
        upper_limit=110 [degrees] lower_stiffness=20 [N*m/degree] lower_limit=-90 [degrees] damping=5
        transition=10 [degrees] compute_dissipation_energy=false
    CoordinateLimitForce knee_flexion_limit_force: coordinate=knee_flexion upper_stiffness=50 upper_limit=-10
        lower_stiffness=50 lower_limit=-140 damping=2 transition=10 compute_dissipation_energy=false
    HuntCrossleyForce foot_floor_force:
      ContactParametersSet contact_parameters:
        ContactParameters: geometry=(floor foot) stiffness=100000000 dissipation=5 static_friction=0 dynamic_friction=0
            viscous_friction=1
    Thelen2003Muscle vastus: min_control=0.01 max_control=1 max_isometric_force=5000 optimal_fiber_length=0.55
        tendon_slack_length=0.25 pennation_angle_at_optimal=0 [radians]
      PathPoint origin: thigh (0.035 0.1 0)
      PathPoint insertion: shank (0.035 0.1 0)
      PathWrap: wrap_object=patella method=hybrid
  ContactGeometrySet:
    ContactHalfSpace floor: socket_frame=/ground location=(0 0 0) orientation=(0 0 -1.570796)
    ContactSphere foot: socket_frame=/bodyset/shank location=(0 -0.25 0) radius=0.1
