# OpenSim document version 30000
Model Tug_of_War:
  length_units: meters
  force_units: N
  gravity: 0 -9.80665 0
  credits:
    Author: The OpenSim Teams License: Creative Commons (CCBY
    3.0). You are free to distribute, remix, tweak, and build upon
    this work, even commercially, as long as you credit us for the
    original
    creation. http://creativecommons.org/licenses/by/3.0/
  BodySet:
    Body ground: mass=0 mass_center=(0 0 0) inertia_xx=0 inertia_yy=0 inertia_zz=0
        meshes=(checkered_floor.vtp block.vtp)
    Body block: mass=20 mass_center=(0 0 0) inertia_xx=0.1333333 inertia_yy=0.1333333 inertia_zz=0.1333333
        meshes=block.vtp
      SliderJoint ground_block: parent_body=ground location_in_parent=(0 0 0) orientation_in_parent=(0 -1.570796 0)
          location=(0 -0.05 0) orientation=(0 -1.570796 0)
        Coordinate block_tz: motion_type=translational default_value=0 range=(-0.3 0.3) clamped=true
  ForceSet:
    Thelen2003Muscle muscle1: min_control=0 max_control=1 optimal_force=1 max_isometric_force=1000
        optimal_fiber_length=0.1 tendon_slack_length=0.2 pennation_angle_at_optimal=0 [radians] default_activation=1
        default_fiber_length=0.25
      PathPoint point1: ground (0 0.05 -0.35)
      PathPoint point2: block (0 0 -0.05)
    Thelen2003Muscle muscle2: min_control=0 max_control=1 optimal_force=1 max_isometric_force=1000
        optimal_fiber_length=0.1 tendon_slack_length=0.2 pennation_angle_at_optimal=0 default_activation=0.05
        default_fiber_length=0.25
      PathPoint point1: ground (0 0.05 0.35)
      PathPoint point2: block (0 0 0.05)
